OpenVSP model (file version 5), 3 components.
Geometry view with OpenVSP parameter names; values to 6 digits, angles in degrees, lengths in the model's unit.
Overall bounding box: X_Min=1 X_Len=30 Y_Min=-11.1 Y_Len=22.2 Z_Min=-1.1 Z_Len=4.82887

Fuselage "Fuselage"
  location (X Y Z) 1 0 0.3, rotation 0 0 0
  bounding box size 30 4 2.8
  Design: Length=30
  cross sections:
    n  XLocPercent  YLocPercent  ZLocPercent  shape
    0  0            0            0            point
    1  0.25         0            0            ellipse Ellipse_Height=2.8 Ellipse_Width=4
    2  0.5          0            0            edit curve Width=4 Height=2.8 AbsoluteFlag=0 SymType=0 cubic Bezier points (X Y): 0.5 -0.0581042, 0.5 -0.132608, 0.447322 -0.259785, 0.353553 -0.353553, 0.259785 -0.447322, 0.132608 -0.5, 0 -0.5, -0.132608 -0.5, -0.259785 -0.447322, -0.353553 -0.353553, -0.447322 -0.259785, -0.5 -0.132608, -0.5 -0.0581042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
    3  0.537433     0            0            edit curve Width=4 Height=2.8 AbsoluteFlag=0 SymType=0 cubic Bezier points (X Y): 0.5 -0.0494041, 0.5 -0.132608, 0.447322 -0.259785, 0.353553 -0.353553, 0.259785 -0.447322, 0.132608 -0.5, 0 -0.5, -0.132608 -0.5, -0.259785 -0.447322, -0.353553 -0.353553, -0.447322 -0.259785, -0.5 -0.132608, -0.5 -0.0494041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
    4  0.75         0            0            ellipse Ellipse_Height=2.8 Ellipse_Width=4
    5  1            0            0            point

Fuselage "Gondola"
  location (X Y Z) 10 0 3, rotation 0 0 0
  bounding box size 16 2 1.45774
  Design: Length=16
  cross sections:
    n  XLocPercent  YLocPercent  ZLocPercent  shape
    0  0            0            0            point
    1  0.25         0            0            ellipse Ellipse_Height=1.2 Ellipse_Width=2
    2  0.445188     0            0            edit curve Width=2 Height=1.2 AbsoluteFlag=0 SymType=0 cubic Bezier points (X Y): 0.5 0, 0.5 -0.132608, 0.447322 -0.259785, 0.353553 -0.353553, 0.259785 -0.447322, 0.132608 -0.5, 0 -0.5, -0.132608 -0.5, -0.259785 -0.447322, -0.353553 -0.353553, -0.447322 -0.259785, -0.5 -0.132608, -0.5 0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
    3  0.5          0            0            ellipse Ellipse_Height=1.2 Ellipse_Width=2
    4  0.75         0            0            as above
    5  1            0            0            point

Wing "Wing"
  location (X Y Z) 12 2.1 1.2, rotation 0 0 0
  symmetric about XZ
  bounding box size 6.19615 22.2 0.400232
  totals: TotalSpan=18 TotalProjectedSpan=18 TotalChord=2.5 TotalArea=45 TotalAR=7.2 MAC=2.8
  root: chord 4, twist 0, NACA 4-series Camber=0 CamberLoc=0.2 ThickChord=0.1
  sections:
    n  Span  Root_Chord  Tip_Chord  Area  Sweep  Sweep_Location  Dihedral  Twist  Twist_Location  tip airfoil
    1  9     4           1          22.5  30     0               0         0      0.25            as above

VSPAERO settings: Sref=120 bref=1 cref=1 Xcg=0 Ycg=0 Zcg=0 AlphaStart=0 AlphaEnd=10 AlphaNpts=3 BetaStart=0 BetaEnd=0 BetaNpts=1 MachStart=0 MachEnd=0 MachNpts=1 ReCref=1e+07 Vinf=100 Rho=0.002377
