OpenVSP model (file version 5), 5 components.
Geometry view with OpenVSP parameter names; values to 6 digits, angles in degrees, lengths in the model's unit.
Overall bounding box: X_Min=0 X_Len=38.4426 Y_Min=-11.9751 Y_Len=23.9501 Z_Min=-1.9164 Z_Len=8.27761

Fuselage "Fuselage"
  location (X Y Z) 0 0 0, rotation 0 0 0
  bounding box size 36.1887 6.07645 4.85944
  Design: Length=38.386
  cross sections:
    n  XLocPercent  YLocPercent  ZLocPercent  shape
    0  0            0            0            point
    1  0.311475     0            0.016        edit curve Width=7.05126 Height=3.39592 AbsoluteFlag=0 SymType=1 PCHIP points (X Y): 0.404469 0.254771, 0.286184 -0.125013, 0.135 -0.44, 0 -0.54, -0.135 -0.44, -0.286184 -0.125013, -0.404469 0.254771, -0.346559 0.580426, -0.164982 0.666187, 0 0.685781, 0.164982 0.666187, 0.346559 0.580426, 0.404469 0.254771
    2  0.5          0            0.016        edit curve Width=6.45294 Height=3.39592 AbsoluteFlag=0 SymType=1 PCHIP points (X Y): 0.416258 0.133301, 0.302842 -0.118929, 0.185743 -0.35295, 0 -0.5, -0.185743 -0.35295, -0.302842 -0.118929, -0.416258 0.133301, -0.356571 0.611946, -0.164982 0.666187, 0 0.685781, 0.164982 0.666187, 0.356571 0.611946, 0.416258 0.133301
    3  0.709016     0            0.00409836   edit curve Width=6.45294 Height=2.51515 AbsoluteFlag=0 SymType=1 PCHIP points (X Y): 0.414474 0.348448, 0.302842 -0.118929, 0.185743 -0.35295, 0 -0.5, -0.185743 -0.35295, -0.302842 -0.118929, -0.414474 0.348448, -0.363195 0.886216, -0.164982 0.666187, 0 0.685781, 0.164982 0.666187, 0.363195 0.886216, 0.414474 0.348448
    4  0.901379     0            0.0041       edit curve Width=6.45294 Height=2.35112 AbsoluteFlag=0 SymType=1 PCHIP points (X Y): 0.427939 0.330711, 0.302842 -0.118929, 0.185743 -0.35295, 0 -0.5, -0.185743 -0.35295, -0.302842 -0.118929, -0.427939 0.330711, -0.369639 0.67612, -0.164982 0.666187, 0 0.685781, 0.164982 0.666187, 0.369639 0.67612, 0.427939 0.330711
    5  0.906228     0            0.011        circle Circle_Diameter=2.45776
    6  0.942757     0            0.011        circle Circle_Diameter=1.99705
    7  1            0            0.011        point

Fuselage "Gondola"
  location (X Y Z) 8.44262 -2.54098 0, rotation 0 0 0
  symmetric about XZ
  bounding box size 26.373 8.6864 3.87417
  Design: Length=30
  cross sections:
    n  XLocPercent  XRotate  YLocPercent  ZLocPercent  shape
    0  0            0        0            0            point
    1  0.120902     33.4286  0            0            edit curve Width=1.42857 Height=4.13878 AbsoluteFlag=0 SymType=0 linear points (X Y): 0.234335 0.145776, 0.566515 -0.443088, -0.0287312 -0.338889, -0.486034 -0.240132, -0.511092 -0.00313664, -0.524482 0.516178, -0.0788297 0.501829, 0.541726 0.486986, 0.234335 0.145776
    2  0.230575     33.4286  0            0            edit curve Width=1.42857 Height=4.13878 AbsoluteFlag=0 SymType=0 linear points (X Y): 0.234335 0.145776, 0.566515 -0.443088, -0.0287312 -0.338889, -0.486034 -0.240132, -0.511092 -0.00313664, -0.524482 0.516178, -0.0788297 0.501829, 0.613162 0.478767, 0.234335 0.145776
    3  0.340247     33.4286  0            0            edit curve Width=1.42857 Height=4.13878 AbsoluteFlag=0 SymType=0 linear points (X Y): 0.234335 0.145776, 0.566515 -0.443088, -0.0287312 -0.338889, -0.486034 -0.240132, -0.511092 -0.00313664, -0.446477 0.54863, -0.0178591 0.507534, 0.696505 0.458219, 0.234335 0.145776
    4  0.401105     33.4286  0            0            edit curve Width=1.42857 Height=4.13878 AbsoluteFlag=0 SymType=0 linear points (X Y): 0.234335 0.145776, 0.566515 -0.443088, -0.0287312 -0.338889, -0.486034 -0.240132, -0.511092 -0.00313664, -0.184544 0.680137, 0.279793 0.602055, 0.791753 0.519863, 0.234335 0.145776
    5  0.461963     33.4286  0            0            edit curve Width=1.42857 Height=4.13878 AbsoluteFlag=0 SymType=0 linear points (X Y): 0.234335 0.145776, 0.566515 -0.443088, -0.0287312 -0.338889, -0.486034 -0.240132, -0.511092 -0.00313664, -0.203326 0.682675, 0.203326 0.631634, 0.868756 0.538058, 0.234335 0.145776
    6  0.625811     33.4286  0            -0.004       edit curve Width=1.42857 Height=4.13878 AbsoluteFlag=0 SymType=0 linear points (X Y): 0.234335 0.145776, 0.566515 -0.443088, -0.0287312 -0.338889, -0.486034 -0.240132, -0.511092 -0.00313664, -0.524482 0.516178, -0.0788297 0.501829, 0.384766 0.501124, 0.234335 0.145776
    7  0.838223     33.4286  0            0.0163934    edit curve Width=1.42857 Height=4.13878 AbsoluteFlag=0 SymType=0 PCHIP points (X Y): -0.0952855 -0.0952961, -0.0279729 -0.192942, 0.0919386 -0.326618, 0.0140138 -0.354997, -0.0107717 -0.355633, -0.49822 -0.243214, -0.553213 -0.196214, -0.571455 -0.0961001, -0.606791 0.192444, -0.611154 0.213724, -0.37347 0.215063, -0.118261 0.20398, -0.119267 0.114897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
    8  1            33.4286  -0.0408123   0.0325181    point

Wing "Wing"
  location (X Y Z) 17.7869 2.86885 1.55738, rotation 0 0 0
  symmetric about XZ
  bounding box size 11.1117 23.9501 1.13488
  totals: TotalSpan=18.2124 TotalProjectedSpan=18.2124 TotalChord=5.80021 TotalArea=111.934 TotalAR=2.96329 MAC=7.11922
  root: chord 11.1111, twist 0, NACA 4-series Camber=0.02 CamberLoc=0.4 ThickChord=0.1
  sections:
    n  Span     Root_Chord  Tip_Chord  Area     Sweep  Sweep_Location  Dihedral  Twist  Twist_Location  tip airfoil
    1  5.35456  11.1111     4.41838    41.5768  34     0               0         0      0.25            NACA 4-series Camber=0.02 CamberLoc=0.4 ThickChord=0.08
    2  3.75166  4.41838     3.25298    14.3902  34     0               0         0      0.25            as above

Wing "GO"
  location (X Y Z) 30.123 3.93443 0.327869, rotation 0 0 0
  symmetric about XZ
  bounding box size 7.464 15.1681 6.61372
  totals: TotalSpan=14.0238 TotalProjectedSpan=7.2228 TotalChord=4.47406 TotalArea=62.7434 TotalAR=0.831462 MAC=5.1401
  root: chord 7.464, twist 0, NACA 4-series Camber=0 CamberLoc=0.4 ThickChord=0.08
  sections:
    n  Span    Root_Chord  Tip_Chord  Area     Sweep  Sweep_Location  Dihedral  Twist  Twist_Location  tip airfoil
    1  7.0119  7.464       1.48413    31.3717  33     0               59        0      0.25            NACA 4-series Camber=0 CamberLoc=0.4 ThickChord=0.06

Wing "Wing"
  location (X Y Z) 18.7705 4.34426 1.55738, rotation 0 0 0
  symmetric about XZ
  bounding box size 9.20688 23.8691 0.940328
  totals: TotalSpan=15.1806 TotalProjectedSpan=15.1806 TotalChord=5.32402 TotalArea=81.0807 TotalAR=2.84223 MAC=5.94713
  root: chord 9.20635, twist 0, NACA 4-series Camber=0.02 CamberLoc=0.4 ThickChord=0.1
  sections:
    n  Span     Root_Chord  Tip_Chord  Area     Sweep  Sweep_Location  Dihedral  Twist  Twist_Location  tip airfoil
    1  3.83864  9.20635     4.41838    26.1502  34     0               0         0      0.25            NACA 4-series Camber=0.02 CamberLoc=0.4 ThickChord=0.08
    2  3.75166  4.41838     3.25298    14.3902  34     0               0         0      0.25            as above

VSPAERO settings: Sref=111.934 bref=23.9501 cref=7.11922 Xcg=21.953 Ycg=0 Zcg=1.55738 AlphaStart=0 AlphaEnd=10 AlphaNpts=3 BetaStart=0 BetaEnd=0 BetaNpts=1 MachStart=0 MachEnd=0 MachNpts=1 ReCref=1e+07 Vinf=100 Rho=0.002377
