OpenVSP model (file version 5), 7 components.
Geometry view with OpenVSP parameter names; values to 6 digits, angles in degrees, lengths in the model's unit.
Overall bounding box: X_Min=0 X_Len=71.149 Y_Min=-21.8728 Y_Len=43.7457 Z_Min=-4.12563 Z_Len=15.4368

Fuselage "Fuselage"
  location (X Y Z) 0 0 0, rotation 0 0 0
  bounding box size 64.2257 3.98978 6.78362
  Design: Length=64.2257
  cross sections:
    n  XLocPercent  YLocPercent  ZLocPercent  shape
    0  0            0            -0.0245902   point
    1  0.278689     0            0            ellipse Ellipse_Height=5.37726 Ellipse_Width=3.56102
    2  0.345808     0            0.00614754   ellipse Ellipse_Height=6.31429 Ellipse_Width=3.48272
    3  0.5          0            0.00819918   ellipse Ellipse_Height=6.31429 Ellipse_Width=2.16625
    4  0.75         0            0.0082       ellipse Ellipse_Height=6.31429 Ellipse_Width=1.12786
    5  1            0            0.0082       point

Wing "Wing2"
  location (X Y Z) 31.1475 0 2.37705, rotation 0 0 0
  symmetric about XZ
  bounding box size 27.7905 43.7457 2.40596
  totals: TotalSpan=43.8864 TotalProjectedSpan=43.7194 TotalChord=15.0552 TotalArea=660.719 TotalAR=2.89289 MAC=16.374
  root: chord 22.773, twist 0, NACA 4-series Camber=0 CamberLoc=0.2 ThickChord=0.03
  sections:
    n  Span     Root_Chord  Tip_Chord  Area     Sweep  Sweep_Location  Dihedral  Twist  Twist_Location  tip airfoil
    1  21.9432  22.773      7.33736    330.359  41     0.0892857       -5        0      0               NACA 4-series Camber=0 CamberLoc=0.2 ThickChord=0.041

Wing "Wing"
  location (X Y Z) 36.127 5 1.47541, rotation 0 0 0
  symmetric about XZ
  bounding box size 22.8428 43.2989 1.89182
  totals: TotalSpan=33.4 TotalProjectedSpan=33.2729 TotalChord=13.1753 TotalArea=440.056 TotalAR=2.51578 MAC=14.0634
  root: chord 19.1, twist 0, NACA 4-series Camber=0 CamberLoc=0.2 ThickChord=0.03
  sections:
    n  Span  Root_Chord  Tip_Chord  Area     Sweep    Sweep_Location  Dihedral  Twist  Twist_Location  tip airfoil
    1  16.7  19.1        7.25066    220.028  41.0333  0.0892857       -5        0      0               NACA 4-series Camber=0 CamberLoc=0.2 ThickChord=0.041

Wing "GO"
  location (X Y Z) 57.0492 4.5082 0, rotation 0 0 0
  symmetric about XZ
  bounding box size 14.0999 27.4744 0.445286
  totals: TotalSpan=18.458 TotalProjectedSpan=18.458 TotalChord=5.954 TotalArea=109.899 TotalAR=3.1001 MAC=6.43758
  root: chord 8.893, twist 0, NACA 4-series Camber=0 CamberLoc=0.2 ThickChord=0.05
  sections:
    n  Span   Root_Chord  Tip_Chord  Area     Sweep  Sweep_Location  Dihedral  Twist  Twist_Location  tip airfoil
    1  9.229  8.893       3.015      54.9495  50.22  0               0         0      0.25            NACA 4-series Camber=0 CamberLoc=0.2 ThickChord=0.04

Wing "VO"
  location (X Y Z) 48.6885 4.09836 2.13115, rotation 90 0 0
  symmetric about XZ
  bounding box size 16.0327 10.9048 9.18003
  totals: TotalSpan=18.522 TotalProjectedSpan=18.3417 TotalChord=9.2985 TotalArea=172.227 TotalAR=1.95335 MAC=10.5944
  root: chord 15.311, twist 0, NACA 4-series Camber=0 CamberLoc=0.2 ThickChord=0.045
  sections:
    n  Span   Root_Chord  Tip_Chord  Area     Sweep  Sweep_Location  Dihedral  Twist  Twist_Location  tip airfoil
    1  9.261  15.311      3.286      86.1134  54     0               -8        0      0.25            NACA 4-series Camber=0 CamberLoc=0.2 ThickChord=0.04

Wing "VentralVO"
  location (X Y Z) 53.1148 4.01639 -1.55738, rotation -90 0 0
  symmetric about XZ
  bounding box size 9.06446 9.31036 2.56825
  totals: TotalSpan=5.20898 TotalProjectedSpan=5.09515 TotalChord=7.3373 TotalArea=38.2199 TotalAR=0.679243 MAC=7.4629
  root: chord 9, twist 0, NACA 4-series Camber=0 CamberLoc=0.2 ThickChord=0.035
  sections:
    n  Span     Root_Chord  Tip_Chord  Area     Sweep    Sweep_Location  Dihedral  Twist  Twist_Location  tip airfoil
    1  2.60449  9           5.6746     19.1099  52.4643  0               12        0      0.25            as above

Fuselage "Gondola"
  location (X Y Z) 17.2951 -3.11475 0.184426, rotation 0 0 0
  symmetric about XZ
  bounding box size 43.5068 10.738 6.04112
  Design: Length=47.7647
  cross sections:
    n  XLocPercent  YLocPercent  YRotate   ZLocPercent  shape
    0  0            0            0         0            point
    1  0.156378     -0.00614754  -59.1429  -0.00409836  rounded rectangle RoundRectXSec_Radius=0.2 RoundedRect_Height=7.48209 RoundedRect_Width=2.85799
    2  0.320641     0            0         0            ellipse Ellipse_Height=5.26781 Ellipse_Width=4.28996
    3  0.5          0.00256148   0         0.00563787   ellipse Ellipse_Height=5.31882 Ellipse_Width=4.63602
    4  0.75         0.00409836   0         0.0128074    ellipse Ellipse_Height=5.57768 Ellipse_Width=4.63909
    5  1            0.01639      0         0.01691      circle Circle_Diameter=4.73381
