OpenVSP model (file version 5), 5 components.
Geometry view with OpenVSP parameter names; values to 6 digits, angles in degrees, lengths in the model's unit.
Overall bounding box: X_Min=0 X_Len=46.93 Y_Min=-16.185 Y_Len=32.37 Z_Min=-2.3798 Z_Len=8.1998

Fuselage "Fuselage"
  location (X Y Z) 0 0 0, rotation 0 0 0
  bounding box size 46.93 4.7596 4.7596
  Design: Length=46.93
  cross sections:
    n  XLocPercent  YLocPercent  ZLocPercent  shape
    0  0            0            0            point
    1  0.377049     0            0            ellipse Ellipse_Height=4.03061 Ellipse_Width=4.03061
    2  0.633835     0            0            ellipse Ellipse_Height=4.7596 Ellipse_Width=4.7596
    3  1            0            0            ellipse Ellipse_Height=3.82653 Ellipse_Width=3.82653
    4  1            0            0            point

Wing "Wing"
  location (X Y Z) 17.32 0 1.9, rotation 0 0 0
  symmetric about XZ
  bounding box size 21.7701 32.37 0.641174
  totals: TotalSpan=32.37 TotalProjectedSpan=32.37 TotalChord=10.79 TotalArea=349.272 TotalAR=3 MAC=14.2456
  root: chord 21.3663, twist 0, NACA 4-digit modified Camber=0 CamberLoc=0.2 IdealCl=0 LERadIndx=6 ThickChord=0.03 ThickLoc=0.3
  sections:
    n  Span    Root_Chord  Tip_Chord  Area     Sweep  Sweep_Location  Dihedral  Twist  Twist_Location  tip airfoil
    1  16.185  21.3663     0.213663   174.636  53.1   0               0         0      0.25            NACA 4-series Camber=0 CamberLoc=0.2 ThickChord=0.1

Wing "GO"
  location (X Y Z) 41.04 0 0, rotation 0 0 0
  symmetric about XZ
  bounding box size 4.63 16.18 0.1389
  totals: TotalSpan=16.18 TotalProjectedSpan=16.18 TotalChord=3.24 TotalArea=52.4232 TotalAR=4.99383 MAC=3.43878
  root: chord 4.63, twist 0, biconvex ThickChord=0.03
  sections:
    n  Span  Root_Chord  Tip_Chord  Area     Sweep  Sweep_Location  Dihedral  Twist  Twist_Location  tip airfoil
    1  8.09  4.63        1.85       26.2116  5.9    0               0         0      0.25            as above

Wing "VO_upper"
  location (X Y Z) 35.9112 8.11 1.92, rotation 90 0 0
  symmetric about XZ
  bounding box size 7.92079 16.4576 3.9
  totals: TotalSpan=7.8 TotalProjectedSpan=7.8 TotalChord=4 TotalArea=31.2 TotalAR=1.95 MAC=5.28105
  root: chord 7.92079, twist 0, biconvex ThickChord=0.03
  sections:
    n  Span  Root_Chord  Tip_Chord  Area  Sweep    Sweep_Location  Dihedral  Twist  Twist_Location  tip airfoil
    1  3.9   7.92079     0.0792079  15.6  63.3929  0               0         0      0.25            biconvex ThickChord=0

Wing "VO_lower", child of "VO_upper"
  location (X Y Z) 35.9112 8.11 1.88, rotation -90 0 0
  symmetric about XZ
  bounding box size 7.92079 16.4576 3.9
  totals: TotalSpan=7.8 TotalProjectedSpan=7.8 TotalChord=4 TotalArea=31.2 TotalAR=1.95 MAC=5.28105
  root: chord 7.92079, twist 0, biconvex ThickChord=0.03
  sections:
    n  Span  Root_Chord  Tip_Chord  Area  Sweep    Sweep_Location  Dihedral  Twist  Twist_Location  tip airfoil
    1  3.9   7.92079     0.0792079  15.6  63.3929  0               0         0      0.25            biconvex ThickChord=0
